// SBML level 3 version 1

model b5model()

  // Compartments:
  compartment default_compartment = 1;
  compartment cell = 1;

  // Species:
  species nik in cell = 0;
  species mkk4 in cell = 0;
  species ask1 in cell = 0;
  species map3k7 in cell = 0;
  species mkk7 in cell = 0;
  species tnfr in cell = 0;
  species egfr in cell = 0;
  species ph in cell = 0;
  species ex in cell = 0;
  species mek in cell = 0;
  species ras in cell = 0;
  species traf2 in cell = 0;
  species ikk in cell = 0;
  species akt in cell = 0;
  species pi3k in cell = 0;
  species ikb in cell = 0;
  species nfkb in cell = 0;
  species cjun in cell = 0;
  species jnk in cell = 0;
  species map3k1 in cell = 0;
  species erk in cell = 0;
  species raf1 in cell = 0;
  species sos in cell = 0;
  species p38 in cell = 0;
  species gsk3 in cell = 0;
  species ap1 in cell = 0;
  species $dnik in default_compartment;
  species $dmkk4 in default_compartment;
  species $dask1 in default_compartment;
  species $dmap3k7 in default_compartment;
  species $dmkk7 in default_compartment;
  species $dtnfr in default_compartment;
  species $degfr in default_compartment;
  species $dph in default_compartment;
  species $dex in default_compartment;
  species $dmek in default_compartment;
  species $dras in default_compartment;
  species $dtraf2 in default_compartment;
  species $dikk in default_compartment;
  species $dakt in default_compartment;
  species $dpi3k in default_compartment;
  species $dikb in default_compartment;
  species $dnfkb in default_compartment;
  species $dcjun in default_compartment;
  species $djnk in default_compartment;
  species $dmap3k1 in default_compartment;
  species $derk in default_compartment;
  species $draf1 in default_compartment;
  species $dsos in default_compartment;
  species $dp38 in default_compartment;
  species $dgsk3 in default_compartment;
  species $dap1 in default_compartment;

  // Parameters:
  map3k7_nik_w = 1;
  tau_nik = 7.1398;
  map3k1_mkk4_w = 0;
  map3k7_mkk4_w = 0;
  map3k7_map3k1_mkk4_AND_w = 1;
  tau_mkk4 = 5.4167;
  traf2_ask1_w = 1;
  tau_ask1 = 5.2731;
  traf2_map3k7_w = 1;
  tau_map3k7 = 0.1;
  map3k1_mkk7_w = 1;
  ask1_mkk7_w = 1;
  ask1_map3k1_mkk7_AND_w = 0;
  tau_mkk7 = 10;
  tnfa_tnfr_w = 1;
  tau_tnfr = 9.1369;
  egf_egfr_w = 1;
  tau_egfr = 1.0937;
  erk_ph_w = 1;
  tau_ph = 0.106;
  nfkb_ex_w = 1;
  tau_ex = 0.6146;
  raf1_mek_w = 1;
  tau_mek = 9.5228;
  sos_ras_w = 1;
  tau_ras = 2.8385;
  tnfr_traf2_w = 1;
  tau_traf2 = 9.9362;
  nik_ikk_w = 1;
  tau_ikk = 5.7463;
  pi3k_akt_w = 1;
  tau_akt = 9.5917;
  egfr_pi3k_w = 1;
  tau_pi3k = 7.7292;
  ikk_ikb_w = 1;
  ex_ikb_w = 1;
  ex_ikk_ikb_AND_w = 0;
  tau_ikb = 0.6778;
  ikb_nfkb_w = 1;
  tau_nfkb = 0.9984;
  jnk_cjun_w = 1;
  tau_cjun = 9.6513;
  mkk7_jnk_w = 1;
  tau_jnk = 1.3215;
  ras_map3k1_w = 1;
  tau_map3k1 = 9.995;
  mek_erk_w = 1;
  tau_erk = 10;
  ras_raf1_w = 1;
  tau_raf1 = 0.8552;
  ph_sos_w = 0;
  egfr_sos_w = 0;
  egfr_ph_sos_AND_w = 1;
  tau_sos = 9.3196;
  mkk4_p38_w = 1;
  tau_p38 = 0.1;
  akt_gsk3_w = 1;
  tau_gsk3 = 0.2602;
  cjun_ap1_w = 1;
  tau_ap1 = 0.2045;
  map3k7_n_nik = 1;
  map3k7_k_nik = 0.0905;
  map3k7_n_mkk4 = 1.09;
  map3k7_k_mkk4 = 0.95;
  map3k1_n_mkk4 = 3.1526;
  map3k1_k_mkk4 = 0.4721;
  traf2_n_ask1 = 3.4873;
  traf2_k_ask1 = 0.15;
  traf2_n_map3k7 = 1;
  traf2_k_map3k7 = 0.0918;
  ask1_n_mkk7 = 3.5966;
  ask1_k_mkk7 = 0.7772;
  map3k1_n_mkk7 = 3.9788;
  map3k1_k_mkk7 = 0.4026;
  tnfa_n_tnfr = 1.0188;
  tnfa_k_tnfr = 0.1173;
  egf_n_egfr = 4.892;
  egf_k_egfr = 0.0905;
  erk_n_ph = 4.611;
  erk_k_ph = 0.1027;
  nfkb_n_ex = 4.9909;
  nfkb_k_ex = 0.4268;
  raf1_n_mek = 1.4875;
  raf1_k_mek = 0.5195;
  sos_n_ras = 1.454;
  sos_k_ras = 0.7119;
  tnfr_n_traf2 = 4.1622;
  tnfr_k_traf2 = 0.5476;
  nik_n_ikk = 4.997;
  nik_k_ikk = 0.1029;
  pi3k_n_akt = 1.0726;
  pi3k_k_akt = 0.9486;
  egfr_n_pi3k = 4.4151;
  egfr_k_pi3k = 0.0944;
  ex_n_ikb = 4.9991;
  ex_k_ikb = 0.6852;
  ikk_n_ikb = 1.5451;
  ikk_k_ikb = 0.95;
  ikb_n_nfkb = 4.9997;
  ikb_k_nfkb = 0.2329;
  jnk_n_cjun = 1.0759;
  jnk_k_cjun = 0.9496;
  mkk7_n_jnk = 4.8747;
  mkk7_k_jnk = 0.0913;
  ras_n_map3k1 = 1.1997;
  ras_k_map3k1 = 0.8298;
  mek_n_erk = 2.5354;
  mek_k_erk = 0.7099;
  ras_n_raf1 = 1;
  ras_k_raf1 = 0.2725;
  egfr_n_sos = 1.0012;
  egfr_k_sos = 0.9375;
  ph_n_sos = 1.4651;
  ph_k_sos = 0.72;
  mkk4_n_p38 = 1.0032;
  mkk4_k_p38 = 0.9329;
  akt_n_gsk3 = 1.0608;
  akt_k_gsk3 = 0.09;
  cjun_n_ap1 = 4.7985;
  cjun_k_ap1 = 0.2653;
  map3k7_fhill_nik = ;
  map3k7_fhill_mkk4 = ;
  map3k1_fhill_mkk4 = ;
  traf2_fhill_ask1 = ;
  traf2_fhill_map3k7 = ;
  ask1_fhill_mkk7 = ;
  map3k1_fhill_mkk7 = ;
  tnfa_fhill_tnfr = ;
  egf_fhill_egfr = ;
  erk_fhill_ph = ;
  nfkb_fhill_ex = ;
  raf1_fhill_mek = ;
  sos_fhill_ras = ;
  tnfr_fhill_traf2 = ;
  nik_fhill_ikk = ;
  pi3k_fhill_akt = ;
  egfr_fhill_pi3k = ;
  pi3k_inh = ;
  ex_fhill_ikb = ;
  ikk_fhill_ikb = ;
  ikb_fhill_nfkb = ;
  jnk_fhill_cjun = ;
  mkk7_fhill_jnk = ;
  ras_fhill_map3k1 = ;
  mek_fhill_erk = ;
  ras_fhill_raf1 = ;
  raf1_inh = ;
  egfr_fhill_sos = ;
  ph_fhill_sos = ;
  mkk4_fhill_p38 = ;
  akt_fhill_gsk3 = ;
  cjun_fhill_ap1 = ;

  // Assignment rules:
  dnik := (0*(1 - map3k7_fhill_nik) + map3k7_nik_w*map3k7_fhill_nik - nik)*tau_nik;
  dmkk4 := (0*(1 - map3k7_fhill_mkk4)*(1 - map3k1_fhill_mkk4) + map3k1_mkk4_w*(1 - map3k7_fhill_mkk4)*map3k1_fhill_mkk4 + map3k7_mkk4_w*map3k7_fhill_mkk4*(1 - map3k1_fhill_mkk4) + (map3k7_mkk4_w || map3k1_mkk4_w || map3k7_map3k1_mkk4_AND_w)*map3k7_fhill_mkk4*map3k1_fhill_mkk4 - mkk4)*tau_mkk4;
  dask1 := (0*(1 - traf2_fhill_ask1) + traf2_ask1_w*traf2_fhill_ask1 - ask1)*tau_ask1;
  dmap3k7 := (0*(1 - traf2_fhill_map3k7) + traf2_map3k7_w*traf2_fhill_map3k7 - map3k7)*tau_map3k7;
  dmkk7 := (0*(1 - ask1_fhill_mkk7)*(1 - map3k1_fhill_mkk7) + map3k1_mkk7_w*(1 - ask1_fhill_mkk7)*map3k1_fhill_mkk7 + ask1_mkk7_w*ask1_fhill_mkk7*(1 - map3k1_fhill_mkk7) + (ask1_mkk7_w || map3k1_mkk7_w || ask1_map3k1_mkk7_AND_w)*ask1_fhill_mkk7*map3k1_fhill_mkk7 - mkk7)*tau_mkk7;
  dtnfr := (0*(1 - tnfa_fhill_tnfr) + tnfa_tnfr_w*tnfa_fhill_tnfr - tnfr)*tau_tnfr;
  degfr := (0*(1 - egf_fhill_egfr) + egf_egfr_w*egf_fhill_egfr - egfr)*tau_egfr;
  dph := (0*(1 - erk_fhill_ph) + erk_ph_w*erk_fhill_ph - ph)*tau_ph;
  dex := (0*(1 - nfkb_fhill_ex) + nfkb_ex_w*nfkb_fhill_ex - ex)*tau_ex;
  dmek := (0*(1 - raf1_fhill_mek) + raf1_mek_w*raf1_fhill_mek - mek)*tau_mek;
  dras := (0*(1 - sos_fhill_ras) + sos_ras_w*sos_fhill_ras - ras)*tau_ras;
  dtraf2 := (0*(1 - tnfr_fhill_traf2) + tnfr_traf2_w*tnfr_fhill_traf2 - traf2)*tau_traf2;
  dikk := (0*(1 - nik_fhill_ikk) + nik_ikk_w*nik_fhill_ikk - ikk)*tau_ikk;
  dakt := (0*(1 - pi3k_fhill_akt) + pi3k_akt_w*pi3k_fhill_akt - akt)*tau_akt;
  dpi3k := (0*(1 - egfr_fhill_pi3k) + egfr_pi3k_w*egfr_fhill_pi3k - pi3k)*tau_pi3k*(1 - pi3k_inh);
  dikb := (ikk_ikb_w*(1 - ex_fhill_ikb)*(1 - ikk_fhill_ikb) + 0*(1 - ex_fhill_ikb)*ikk_fhill_ikb + (ex_ikb_w || ikk_ikb_w || ex_ikk_ikb_AND_w)*ex_fhill_ikb*(1 - ikk_fhill_ikb) + ex_ikb_w*ex_fhill_ikb*ikk_fhill_ikb - ikb)*tau_ikb;
  dnfkb := (ikb_nfkb_w*(1 - ikb_fhill_nfkb) + 0*ikb_fhill_nfkb - nfkb)*tau_nfkb;
  dcjun := (0*(1 - jnk_fhill_cjun) + jnk_cjun_w*jnk_fhill_cjun - cjun)*tau_cjun;
  djnk := (0*(1 - mkk7_fhill_jnk) + mkk7_jnk_w*mkk7_fhill_jnk - jnk)*tau_jnk;
  dmap3k1 := (0*(1 - ras_fhill_map3k1) + ras_map3k1_w*ras_fhill_map3k1 - map3k1)*tau_map3k1;
  derk := (0*(1 - mek_fhill_erk) + mek_erk_w*mek_fhill_erk - erk)*tau_erk;
  draf1 := (0*(1 - ras_fhill_raf1) + ras_raf1_w*ras_fhill_raf1 - raf1)*tau_raf1*(1 - raf1_inh);
  dsos := (ph_sos_w*(1 - egfr_fhill_sos)*(1 - ph_fhill_sos) + 0*(1 - egfr_fhill_sos)*ph_fhill_sos + (egfr_sos_w || ph_sos_w || egfr_ph_sos_AND_w)*egfr_fhill_sos*(1 - ph_fhill_sos) + egfr_sos_w*egfr_fhill_sos*ph_fhill_sos - sos)*tau_sos;
  dp38 := (0*(1 - mkk4_fhill_p38) + mkk4_p38_w*mkk4_fhill_p38 - p38)*tau_p38;
  dgsk3 := (akt_gsk3_w*(1 - akt_fhill_gsk3) + 0*akt_fhill_gsk3 - gsk3)*tau_gsk3;
  dap1 := (0*(1 - cjun_fhill_ap1) + cjun_ap1_w*cjun_fhill_ap1 - ap1)*tau_ap1;

  // Reactions:
  J_dnik: -> $dnik; (0*(1 - map3k7_fhill_nik) + map3k7_nik_w*map3k7_fhill_nik - nik)*tau_nik;  // modifiers: nik
  J_dmkk4: -> $dmkk4; (0*(1 - map3k7_fhill_mkk4)*(1 - map3k1_fhill_mkk4) + map3k1_mkk4_w*(1 - map3k7_fhill_mkk4)*map3k1_fhill_mkk4 + map3k7_mkk4_w*map3k7_fhill_mkk4*(1 - map3k1_fhill_mkk4) + (map3k7_mkk4_w || map3k1_mkk4_w || map3k7_map3k1_mkk4_AND_w)*map3k7_fhill_mkk4*map3k1_fhill_mkk4 - mkk4)*tau_mkk4;  // modifiers: mkk4
  J_dask1: -> $dask1; (0*(1 - traf2_fhill_ask1) + traf2_ask1_w*traf2_fhill_ask1 - ask1)*tau_ask1;  // modifiers: ask1
  J_dmap3k7: -> $dmap3k7; (0*(1 - traf2_fhill_map3k7) + traf2_map3k7_w*traf2_fhill_map3k7 - map3k7)*tau_map3k7;  // modifiers: map3k7
  J_dmkk7: -> $dmkk7; (0*(1 - ask1_fhill_mkk7)*(1 - map3k1_fhill_mkk7) + map3k1_mkk7_w*(1 - ask1_fhill_mkk7)*map3k1_fhill_mkk7 + ask1_mkk7_w*ask1_fhill_mkk7*(1 - map3k1_fhill_mkk7) + (ask1_mkk7_w || map3k1_mkk7_w || ask1_map3k1_mkk7_AND_w)*ask1_fhill_mkk7*map3k1_fhill_mkk7 - mkk7)*tau_mkk7;  // modifiers: mkk7
  J_dtnfr: -> $dtnfr; (0*(1 - tnfa_fhill_tnfr) + tnfa_tnfr_w*tnfa_fhill_tnfr - tnfr)*tau_tnfr;  // modifiers: tnfr
  J_degfr: -> $degfr; (0*(1 - egf_fhill_egfr) + egf_egfr_w*egf_fhill_egfr - egfr)*tau_egfr;  // modifiers: egfr
  J_dph: -> $dph; (0*(1 - erk_fhill_ph) + erk_ph_w*erk_fhill_ph - ph)*tau_ph;  // modifiers: ph
  J_dex: -> $dex; (0*(1 - nfkb_fhill_ex) + nfkb_ex_w*nfkb_fhill_ex - ex)*tau_ex;  // modifiers: ex
  J_dmek: -> $dmek; (0*(1 - raf1_fhill_mek) + raf1_mek_w*raf1_fhill_mek - mek)*tau_mek;  // modifiers: mek
  J_dras: -> $dras; (0*(1 - sos_fhill_ras) + sos_ras_w*sos_fhill_ras - ras)*tau_ras;  // modifiers: ras
  J_dtraf2: -> $dtraf2; (0*(1 - tnfr_fhill_traf2) + tnfr_traf2_w*tnfr_fhill_traf2 - traf2)*tau_traf2;  // modifiers: traf2
  J_dikk: -> $dikk; (0*(1 - nik_fhill_ikk) + nik_ikk_w*nik_fhill_ikk - ikk)*tau_ikk;  // modifiers: ikk
  J_dakt: -> $dakt; (0*(1 - pi3k_fhill_akt) + pi3k_akt_w*pi3k_fhill_akt - akt)*tau_akt;  // modifiers: akt
  J_dpi3k: -> $dpi3k; (0*(1 - egfr_fhill_pi3k) + egfr_pi3k_w*egfr_fhill_pi3k - pi3k)*tau_pi3k*(1 - pi3k_inh);  // modifiers: pi3k
  J_dikb: -> $dikb; (ikk_ikb_w*(1 - ex_fhill_ikb)*(1 - ikk_fhill_ikb) + 0*(1 - ex_fhill_ikb)*ikk_fhill_ikb + (ex_ikb_w || ikk_ikb_w || ex_ikk_ikb_AND_w)*ex_fhill_ikb*(1 - ikk_fhill_ikb) + ex_ikb_w*ex_fhill_ikb*ikk_fhill_ikb - ikb)*tau_ikb;  // modifiers: ikb
  J_dnfkb: -> $dnfkb; (ikb_nfkb_w*(1 - ikb_fhill_nfkb) + 0*ikb_fhill_nfkb - nfkb)*tau_nfkb;  // modifiers: nfkb
  J_dcjun: -> $dcjun; (0*(1 - jnk_fhill_cjun) + jnk_cjun_w*jnk_fhill_cjun - cjun)*tau_cjun;  // modifiers: cjun
  J_djnk: -> $djnk; (0*(1 - mkk7_fhill_jnk) + mkk7_jnk_w*mkk7_fhill_jnk - jnk)*tau_jnk;  // modifiers: jnk
  J_dmap3k1: -> $dmap3k1; (0*(1 - ras_fhill_map3k1) + ras_map3k1_w*ras_fhill_map3k1 - map3k1)*tau_map3k1;  // modifiers: map3k1
  J_derk: -> $derk; (0*(1 - mek_fhill_erk) + mek_erk_w*mek_fhill_erk - erk)*tau_erk;  // modifiers: erk
  J_draf1: -> $draf1; (0*(1 - ras_fhill_raf1) + ras_raf1_w*ras_fhill_raf1 - raf1)*tau_raf1*(1 - raf1_inh);  // modifiers: raf1
  J_dsos: -> $dsos; (ph_sos_w*(1 - egfr_fhill_sos)*(1 - ph_fhill_sos) + 0*(1 - egfr_fhill_sos)*ph_fhill_sos + (egfr_sos_w || ph_sos_w || egfr_ph_sos_AND_w)*egfr_fhill_sos*(1 - ph_fhill_sos) + egfr_sos_w*egfr_fhill_sos*ph_fhill_sos - sos)*tau_sos;  // modifiers: sos
  J_dp38: -> $dp38; (0*(1 - mkk4_fhill_p38) + mkk4_p38_w*mkk4_fhill_p38 - p38)*tau_p38;  // modifiers: p38
  J_dgsk3: -> $dgsk3; (akt_gsk3_w*(1 - akt_fhill_gsk3) + 0*akt_fhill_gsk3 - gsk3)*tau_gsk3;  // modifiers: gsk3
  J_dap1: -> $dap1; (0*(1 - cjun_fhill_ap1) + cjun_ap1_w*cjun_fhill_ap1 - ap1)*tau_ap1;  // modifiers: ap1
end
